OpenVSP model (file version 5), 4 components.
Geometry view with OpenVSP parameter names; values to 6 digits, angles in degrees, lengths in the model's unit.
Overall bounding box: X_Min=-0.0589075 X_Len=18.3594 Y_Min=-14.225 Y_Len=28.45 Z_Min=-0.519277 Z_Len=4.02528

Fuselage "FuselageGeom"
  location (X Y Z) 0 0 0, rotation 0 0 0
  bounding box size 18.3594 1.27 1.03855
  Design: Length=18.288
  cross sections:
    n  XLocPercent  YLocPercent  ZLocPercent  shape
    0  0            0            0            rounded rectangle RoundRectXSec_Radius=0.2 RoundedRect_Height=0.508 RoundedRect_Width=0.635
    1  0.25         0            0            rounded rectangle RoundRectXSec_Radius=0.2 RoundedRect_Height=1.016 RoundedRect_Width=1.27
    2  0.5          0            0            as above
    3  0.75         0            0            as above
    4  1            0            0.0141076    rounded rectangle RoundRectXSec_Radius=0.2 RoundedRect_Height=0.5 RoundedRect_Width=0.5

Wing "WingGeom"
  location (X Y Z) 2.7432 0 -0.254, rotation 0 0 0
  symmetric about XZ
  bounding box size 5.08023 28.45 0.725265
  totals: TotalSpan=28.45 TotalProjectedSpan=28.45 TotalChord=5.08 TotalArea=144.526 TotalAR=5.6004 MAC=5.08001
  root: chord 5.08, twist 0, airfoil file ""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 BaseThickChord=0.137925 ThickChord=0.137925
  sections:
    n  Span    Root_Chord  Tip_Chord  Area     Sweep  Sweep_Location  Dihedral  Twist  Twist_Location  tip airfoil
    1  14.225  5.08        5.08       72.2631  0      0               0         0      0.25            as above

Wing "HtailGeom"
  location (X Y Z) 16.0655 0 0.258, rotation 0 0 0
  symmetric about XZ
  bounding box size 2.2225 14.224 0.266814
  totals: TotalSpan=14.224 TotalProjectedSpan=14.224 TotalChord=2.2225 TotalArea=31.6128 TotalAR=6.4 MAC=2.2225
  root: chord 2.2225, twist 0, airfoil file ""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 BaseThickChord=0.120034 ThickChord=0.120034
  sections:
    n  Span   Root_Chord  Tip_Chord  Area     Sweep  Sweep_Location  Dihedral  Twist  Twist_Location  tip airfoil
    1  7.112  2.2225      2.2225     15.8064  0      0               0         0      0.25            as above

Wing "VtailGeom"
  location (X Y Z) 16.0655 0 0.458, rotation 90 0 0
  bounding box size 2.2225 0.266814 3.048
  totals: TotalSpan=3.048 TotalProjectedSpan=3.048 TotalChord=1.66688 TotalArea=5.08064 TotalAR=1.82857 MAC=1.72861
  root: chord 2.2225, twist 0, airfoil file ""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 BaseThickChord=0.120034 ThickChord=0.120034
  sections:
    n  Span   Root_Chord  Tip_Chord  Area     Sweep   Sweep_Location  Dihedral  Twist  Twist_Location  tip airfoil
    1  3.048  2.2225      1.11125    5.08064  20.031  0               0         0      0.25            as above
